# 3D copper block simulation
boundary    p p p
units       metal
atom_style  atomic

# geometry
read_data	al.pos

# deep potential
pair_style  	deepmd frozen_model.pb
#/opt
pair_coeff
neighbor       0.5 nsq
neigh_modify   every 1 delay 0 check yes

#Langevin random seed
variable r equal 57085
variable t equal 80
variable d equal 1

mass 1 27
# initialize
velocity all create $t 28459 rot yes dist gaussian mom yes
reset_timestep 0

# fixes
fix      1 all npt temp $t $t $d iso 1. 1. 1. pchain 8 drag 1.0
fix      2 all phonon 10 50000 500000 map.in AlPhonon

#
timestep 1e-3

# output
#                    1    2    3  4  5     6   7  8  9  10 11 12
thermo_style  custom step temp pe ke press vol lx ly lz xy xz yz
thermo  100

restart 2000000 restart.one restart.two

# execution
run 	 6500000
write_restart Restart.final
